π_1 := 0.4
π_2 := 0.5
solve block
    # guess values
    a := 0
    b := 0
    g := 0
    j := 0
    c := 0
    f := 0
    k := 0
    d := 0
    h := 0
    l := 0
    e := 0
    i := 0
    m := 0
    # constraints
    a == 0
    b == 0
    c == 0.4*d + 0.2*g + 0.5*e
    d == 0.4*c + 0.2*f
    e == 0.6*c + 0.3*f
    g == 0.2*i + 0.2*f
    h == 0.3*f + 0.3*i
    i == 0.3*g + 0.2*m + 0.5*k + 0.5*h + 0.5*j
    j == 0.2*i + 0.3*l
    k == 0.6*l + 0.3*i
    l == 0.3*j + 0.5*k + 0.8*m
    m == 0.2*l
    a + b + c + d + e + f + g + h + i + j + k + l + m == 1
    # solver
    [a; b; c; d; e; f; g; h; i; j; k; l; m] := find(a, b, c, d, e, f, g, h, i, j, k, l, m) = [0; 0; 0.107625; 0.0821891; 0.123284; 0.195695; 0.065539; 0.0983084; 0.132; 0.0448799; 0.0765599; 0.0615999; 0.01232]
end solve block
